// COMSOL Multiphysics 6.1.0.229 model "isospectral_drums.mph"
// Isospectral Drums
// By computing the same set of eigenvalues for two different planar membrane shapes, this example demonstrates that you cannot hear the shape of a drum.
// Outline of the model tree
// Components: comp1 "Component 1", comp2 "Component 2"

Geometry
  geom1 "Geometry 1" [comp1] (2D, length unit m)
    pol1: Polygon | source = table; table = {{-3, -3}, {-3, -1}, {1, 3}, {1, 1}, {3, 1}, {1, -1}, {-1, -1}, {-1, -3}}
    fin: Finalize "Form Union"
  geom2 "Geometry 2" [comp2] (2D, length unit m)
    pol1: Polygon | source = table; table = {{-3, 1}, {1, 1}, {1, 3}, {3, 1}, {1, -1}, {-1, -1}, {-1, -3}, {-3, -1}}
    fin: Finalize "Form Union"

Physics
  c: CoefficientFormPDE [geom1] on all domains
    dependent variable u
    cfeq1: CoefficientFormPDE (default) | c = {1, 0, 0, 1}; f = 1; da = 1
    zflx1: ZeroFluxBoundary "Zero Flux 1" (default)
    init1: init "Initial Values 1" (default)
    dir1: DirichletBoundary "Dirichlet Boundary Condition 1" on all boundaries | r = 0
  c2: CoefficientFormPDE [geom2] on all domains
    dependent variable u2
    cfeq1: CoefficientFormPDE (default) | c = {1, 0, 0, 1}; f = 1; da = 1
    zflx1: ZeroFluxBoundary "Zero Flux 1" (default)
    init1: init "Initial Values 1" (default)
    dir1: DirichletBoundary "Dirichlet Boundary Condition 1" on all boundaries | r = 0

Mesh
  mesh1 "Mesh 1" [geom1] (physics-controlled)
    size: MeshSizeDefault | hauto = 2
  mesh2 "Mesh 2" [geom2] (physics-controlled)
    size: MeshSizeDefault | hauto = 2

Studies
  std1 "Study 1"
    eigv: Eigenvalue | linpsolnum = auto; solve for = {c}
  std2 "Study 2"
    eigv: Eigenvalue | linpsolnum = auto; solve for = {c2}

Solver configurations
  sol1 "Solution 1" (study std1)
    v1: Variables "Dependent Variables 1"
    e1: Eigenvalue "Eigenvalue Solver 1"
      dDef: Direct
  sol2 "Solution 2" (study std2)
    v1: Variables "Dependent Variables 1"
    e1: Eigenvalue "Eigenvalue Solver 1"
      dDef: Direct

Datasets
  dset1: Solution | solution = sol1
  dset2: Solution | solution = sol2
  dset3: Solution | solution = sol2

Derived values
  int1: IntSurface "Surface Integration 1" on domains 1 | data = dset1; table = tbl1; expr = with(1,u)*with(2,u)
  int2: IntSurface "Surface Integration 2" on domains 1 | data = dset3; table = tbl2; expr = with(1,u2)*with(2,u2)

Tables
  tbl1: Table
    // Surface Integration 1
    Eigenvalue (rad/s) | with(1,u)*with(2,u) (m^2)
    2.5396 | 5.44009e-15
    3.65716 | 5.44009e-15
    5.17881 | 5.44009e-15
    6.5383 | 5.44009e-15
    7.25116 | 5.44009e-15
    9.21083 | 5.44009e-15
  tbl2: Table
    // Surface Integration 2
    Eigenvalue (rad/s) | Dependent variable u (m^2)
    2.5396 | 9.54792e-15
    3.65716 | 9.54792e-15
    5.1788 | 9.54792e-15
    6.5383 | 9.54792e-15
    7.25117 | 9.54792e-15
    9.21084 | 9.54792e-15

Plots
  pg1: PlotGroup2D "Coefficient Form PDE" | data = dset1
    surf1: Surface | expr = u
  pg2: PlotGroup2D "Coefficient Form PDE 2" | data = dset3
    surf1: Surface | expr = u2